// COMSOL Multiphysics 6.3.0.290 model "皮卡球.mph"
// Outline of the model tree

Functions
  an1: Analytic "解析 1" | expr = 50*sin(40*x); fununit = mm; argunit = s

Probes
  var1: GlobalVariable "全局变量探针 1" | expr = mbd.rd2.u; unit = mm; descr = 刚体位移，x 分量; table = tbl1
  var2: GlobalVariable "全局变量探针 2" | expr = mbd.rd2.v; unit = mm; descr = 刚体位移，y 分量; table = tbl1

Geometry
  geom1 "几何 1" (2D, length unit mm)
    c1: Circle "圆 1" | r = 17; pos = {-100, 0}
    c2: Circle "圆 2" | r = 17; pos = {100, 0}
    ls1: LineSegment "线段 1" | specify1 = coord; coord1 = {-100, 15}; specify2 = coord; coord2 = {0, 50}
    ls2: LineSegment "线段 2"
      specify1 = coord
      vertex1 = c2(1) points 4
      coord1 = {100, 15}
      specify2 = coord
      coord2 = {0, 50}
    thi1: Thicken2D "加厚 1" | input = ls1; offset = asymmetric; totalthick = 1; upthick = 1
    thi2: Thicken2D "加厚 2" | input = ls2; offset = asymmetric; totalthick = 1; downthick = 1
    uni1: Union "并集 1" | input = c1, c2, thi1, thi2
    del1: Delete "删除实体 1" | input = uni1(1) boundaries 1-3, 10-12
    c3: Circle "圆 3" | r = 2; pos = {0, 50}
    uni2: Union "并集 2" | input = c3, del1
    del2: Delete "删除实体 2" | input = uni2(1) boundaries 3-8
    fin: Finalize "形成联合体"

Materials
  mat1: Common "材料 1" on domains 3, 5
    def: def "基本"
      density = 910
    Enu: Enu "杨氏模量和泊松比"
      E = 10e9
      nu = 0.3
  mat2: Common "材料 2" on domains 1, 2, 4
    def: def "基本"
      density = 100
    Enu: Enu "杨氏模量和泊松比"
      E = 1e9
      nu = 0.4

Physics
  mbd: MultibodyDynamics "多体动力学" on all domains
    dependent variable u = {u, v, w}
    lemm1: LinearElasticModel "线弹性材料 1" (default)
    free1: Free "自由 1" (default)
    init1: init "初始值 1" (default)
    rd1: RigidDomain "刚性材料 1" on domains 3
    gacc1: GravityAcceleration "重力 1"
    rbc1: RigidBodyContact "刚体接触 1"
      Source = rd1
      Destination = rd2
      DestInside = 0
      SourceSelection: domains 3
      DestinationSelection: domains 5
    rd2: RigidDomain "刚性材料 2" on domains 5
    hgj1: HingeJoint "铰链关节 1"
      Source = rd4
      Destination = rd5
      SourceSelection: domains 2
      DestinationSelection: domains 4
      cjb1: CenterOfJointBnd "关节中心：边界 1" on boundaries 17, 18
    hgj2: HingeJoint "铰链关节 2"
      Source = rd3
      Destination = rd5
      SourceSelection: domains 1
      DestinationSelection: domains 4
      cjb1: CenterOfJointBnd "关节中心：边界 1" on boundaries 11, 12
    rd3: RigidDomain "刚性材料 3" on domains 1, 4
    rd4: RigidDomain "刚性材料 4" on domains 2
    hgj4: HingeJoint "铰链关节 4"
      Source = rd3
      Destination = rd1
      SourceSelection: domains 1
      DestinationSelection: domains 3
      cjb1: CenterOfJointBnd "关节中心：边界 1" on boundaries 9
    hgj5: HingeJoint "铰链关节 5"
      Source = rd4
      Destination = rd2
      SourceSelection: domains 2
      DestinationSelection: domains 5
      cjb1: CenterOfJointBnd "关节中心：边界 1" on boundaries 21
    rd5: RigidDomain "fuding" on domains 4
      pdr1: PrescribedDispRot "指定位移/旋转 1" | Direction = {1, 1, 0}; U0 = {0, an1(t), 0}

Mesh
  mesh1 "网格 1" (physics-controlled)
    size: MeshSizeDefault "大小" | hauto = 3

Studies
  std1 "研究 1"
    time: Transient "瞬态" | tlist = range(0,0.01,2)

Solver configurations
  sol1 "解 1" (study std1)
    v1: Variables "因变量 1"
    t1: Time "瞬态求解器 1"
      dDef: Direct "直接"
      fc1: FullyCoupled "全耦合 1"

Datasets
  dset1: Solution | solution = sol1
  dset2: Solution "探针解 2" | solution = sol1

Derived values
  gev1: EvalGlobal "全局变量探针 2" | data = dset2; table = tbl1; expr = mbd.rd2.v
  gev2: EvalGlobal "全局变量探针 1" | data = dset2; table = tbl1; expr = mbd.rd2.u

Tables
  tbl1: Table "探针表 1"
    时间 (s) | 刚体位移，y 分量 (mm) | 刚体位移，x 分量 (mm)
    0 | 0.000336881 | -0.000997852
    4.23057e-06 | 0.000356301 | -0.00105538
    4.46115e-06 | 0.000375721 | -0.00111291
    4.9223e-06 | 0.00041456 | -0.00122798
    5.84459e-06 | 0.000492237 | -0.00145812
    7.68919e-06 | 0.000647584 | -0.00191846
    1.13784e-05 | 0.000958254 | -0.00283934
    1.87568e-05 | 0.00157949 | -0.00468194
    3.35135e-05 | 0.00282156 | -0.00837051
    6.3027e-05 | 0.00530408 | -0.0157611
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
Plots
  pg1: PlotGroup2D "位移 (mbd)" | data = dset1
    surf1: Surface "表面" | expr = mbd.disp
      def1: Deform "变形" | expr = {u, v}
  pg2: PlotGroup2D "速度 (mbd)" | data = dset1
    surf1: Surface "域编号" | expr = mod(dom,10); descr = 域编号
      def1: Deform "变形" | expr = {u, v}
    arwl1: ArrowLine "线上箭头" | expr = {mbd.u_tX, mbd.u_tY}
      def1: Deform "变形" | expr = {u, v}
  pg3: PlotGroup1D "探针绘图组 3"
    tblp1: Table "探针表图 1" | table = tbl1; xaxisdata = auto; plotcolumns = {2, 3}

Exports
  anim1: Animation "动画 1" | giffilename = C:\Users\31534\Downloads\lato0000.gif; framesel = all
  anim2: Animation "动画 2" | target = player
  anim3: Animation "动画 3" | giffilename = G:\客户-皮卡\Untitled.gif
  anim4: Animation "动画 4" | target = player; framesel = all
  anim5: Animation "动画 5" | target = player
  anim6: Animation "动画 6" | target = player
  anim7: Animation "动画 7" | giffilename = G:\客户-皮卡\Untitled.gif